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M := transpose([
    100.86, 99.05, 98.61, 100.09, 99.43, 97.44, 101.52, 99.22, 97.59, 97.93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])
n := 50
k := 1 + 3.322*log(50, 10)
m := ceil(k) = 7
h := (max(M) - min(M))/m = 1.29571
i := 0 .. m
IR := histogram(m, M)
sort(M) = [
    94.32; 95.94; 96.77; 97.18; 97.24; 97.35; 97.37; 97.44; 97.59; 97.67
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]
transpose(IR) = [94.9679, 96.2636, 97.5593, 98.855, 100.151, 101.446, 102.742; 1, 2, 13, 12, 11, 7, 4]
xv := mean(M) = 99.3592
s := Stdev(M) = 1.87773
median(M) = 99.28
f(x) := dnorm(x, xv, s)
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GR[i] := min(M) + h*i
GR = [94.32; 95.6157; 96.9114; 98.2071; 99.5029; 100.799; 102.094; 103.39]
GR1 := [-∞; 94.32; 95.616; 96.911; 98.207; 99.503; 100.799; 102.094; 103.39; ∞]
nn := hist(GR1, M) = [0; 1; 2; 13; 12; 11; 7; 3; 1]
sum(nn[i], i = 0 .. m + 1) = 50
j := 0 .. m + 1
p[j] := pnorm(GR1[j + 1], xv, s) - pnorm(GR1[j], xv, s)
transpose(p) = [0.00364105, 0.0194641, 0.0730448, 0.173586, 0.260786, 0.247871, 0.148972, 0.0567246, 0.0159114]
sum(p[j], j) = 1
nt := 50*p
sum(nt[j], j) = 50
transpose(nt) = [0.182053, 0.973207, 3.65224, 8.6793, 13.0393, 12.3935, 7.44858, 2.83623, 0.795569]
GR2 := [-∞; 98.207; 99.503; 100.799; ∞]
nn1 := hist(GR2, M) = [16; 12; 11; 11]
j := 0 .. 3
p1[j] := pnorm(GR2[j + 1], xv, s) - pnorm(GR2[j], xv, s)
transpose(p1) = [0.269736, 0.260786, 0.247871, 0.221608]
sum(p1[j], j) = 1
nt1 := 50*p1
sum(nt1[j], j) = 50
transpose(nt1) = [13.4868, 13.0393, 12.3935, 11.0804]
χN := sum((nn1[j] - nt1[j])^2/nt1[j], j) = 0.708434
χk := qchisq(1 - 0.05, 5 - 2 - 1) = 5.99146
# Вывод : Наблюдаемое значение χN не входит в критическую область (χk; ∞), поэтому гипотеза о том, что СВ Х - подчинена нормальному закону, принимается
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M := transpose([
    0.22, 1.51, 1.93, 0.41, 0.85, 11.25, 0.51, 0.57, 0.22, 5.52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])
n := 50
k := 1 + 3.322*log(50, 10)
k := ceil(k) = 7
h := (max(M) - min(M))/k = 2.36571
i := 0 .. k
IR := histogram(k, M)
transpose(IR) = [1.24286, 3.60857, 5.97429, 8.34, 10.7057, 13.0714, 15.4371; 18, 11, 8, 5, 4, 1, 3]
xv := mean(M) = 4.8644
s := Stdev(M) = 4.36991
median(M) = 3.49
f(x) := dexp(x, 1/xv)
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GR[i] := min(M) + h*i
GR1 := [-∞; 0.06; 2.426; 4.791; 7.157; 9.523; 11.889; 14.254; 16.62; ∞]
GR = [0.06; 2.42571; 4.79143; 7.15714; 9.52286; 11.8886; 14.2543; 16.62]
nn := hist(GR1, M) = [0; 18; 11; 8; 5; 4; 1; 2; 1]
sum(nn[i], i = 0 .. k + 1) = 50
j := 0 .. k + 1
p[j] := pexp(GR1[j + 1], 1/xv) - pexp(GR1[j], 1/xv)
transpose(p) = [0.0122588, 0.380437, 0.233832, 0.143846, 0.0884426, 0.0543782, 0.033423, 0.0205608, 0.0328219]
sum(p[j], j) = 1
nt := 50*p
sum(nt[j], j) = 50
transpose(nt) = [0.612938, 19.0219, 11.6916, 7.19231, 4.42213, 2.71891, 1.67115, 1.02804, 1.64109]
GR2 := [-∞; 2.426; 4.791; 7.157; ∞]
nn1 := hist(GR2, M) = [18; 11; 8; 13]
j := 0 .. 3
p1[j] := pexp(GR2[j + 1], 1/xv) - pexp(GR2[j], 1/xv)
transpose(p1) = [0.392696, 0.233832, 0.143846, 0.229626]
sum(p1[j], j) = 1
nt1 := 50*p1
sum(nt1[j], j) = 50
transpose(nt1) = [19.6348, 11.6916, 7.19231, 11.4813]
χN := sum((nn1[j] - nt1[j])^2/nt1[j], j) = 0.468606
χk := qchisq(1 - 0.05, 5 - 2 - 1) = 5.99146
# Вывод : Наблюдаемое значение χN не входит в критическую область (χk; ∞), поэтому гипотеза о том, что СВ Х - подчинена показательному закону, принимается
